ORIGIN := 1
λ := [1; 1.5; 2; 2.5; 3; 3.5; 4; 4.5; 5; 5.5; 6]
n := 1
m := 2
μ[1] := 5
μ[2] := 5
A := λ
ρ[1] := λ/μ[1] = [0.2; 0.3; 0.4; 0.5; 0.6; 0.7; 0.8; 0.9; 1; 1.1; 1.2]
p0[1] := (1 + ρ[1]/1 + ρ[1]^2/1 + ρ[1]^3/1)^-1 = [0.801282; 0.705716; 0.615764; 0.533333; 0.459559; 0.394789; 0.338753; 0.290782; 0.25; 0.215471; 0.186289]
Potk1 := vectorize((ρ[1]^3/1)*p0[1]) = [0.00641026; 0.0190543; 0.0394089; 0.0666667; 0.0992647; 0.135413; 0.173442; 0.21198; 0.25; 0.286792; 0.321908]
λ2 := vectorize(λ*(1 - Potk1)) = [0.99359; 1.47142; 1.92118; 2.33333; 2.70221; 3.02606; 3.30623; 3.54609; 3.75; 3.92265; 4.06855]
ρ[2] := λ2/μ[2] = [0.198718; 0.294284; 0.384236; 0.466667; 0.540441; 0.605211; 0.661247; 0.709218; 0.75; 0.784529; 0.813711]
p0[2] := (1 + ρ[2]/1 + ρ[2]^2/1 + ρ[2]^3/1)^-1 = [0.802533; 0.711049; 0.629484; 0.559887; 0.50242; 0.455961; 0.418827; 0.389266; 0.365714; 0.346875; 0.331717]
Potk2 := vectorize((ρ[2]^3/1)*p0[2]) = [0.00629759; 0.0181217; 0.0357092; 0.0569011; 0.0793071; 0.101076; 0.121095; 0.138863; 0.154286; 0.167494; 0.178722]
λ3 := vectorize(λ2*(1 - Potk2))
Potk := 1 - λ3/λ = [0.0126675; 0.0368307; 0.0737108; 0.119774; 0.170699; 0.222802; 0.273533; 0.321407; 0.365714; 0.40625; 0.443098]
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